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/batch
! ANSYS input file written by Workbench version 2021 R1
! File used for geometry attach: C:\Users\Shiv\Documents\ANSYS\1D_Conduction_HW_files\dp0\SYS\DM\SYS.scdoc
/title,1D_Conduction_HW--Steady-State Thermal (A5)
/com,--- Data in consistent BIN units. See Solving Units in the help system for more information.
/units,BIN
/prep7
! Turn off shape checking because checks already performed inside WB mesher.
! See help system for more information.
SHPP,OFF,,NOWARN
etcon,set             ! allow ANSYS to choose best KEYOP's for 180x elements, resets any applicable keyopt to MAPDL defaults
/com,*********** Nodes for the whole assembly ***********
nblock,3,,15
(1i9,3e20.9e3)
        1     0.000000000E+00     3.937007874E+01     0.000000000E+00
        2     0.000000000E+00     0.000000000E+00     0.000000000E+00
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-1
/com,*********** Elements for Body 1 "SYS\Surface" ***********
et,1,292
keyo,1,3,3
eblock,19,solid,,6
(19i9)
        1        1        1        1        0        0        0        0        4        0        1        4        5       14        3
        1        1        1        1        0        0        0        0        4        0        2        5        6       13       14
        1        1        1        1        0        0        0        0        4        0        3        6        7       12       13
        1        1        1        1        0        0        0        0        4        0        4        7        8       11       12
        1        1        1        1        0        0        0        0        4        0        5        8        9       10       11
        1        1        1        1        0        0        0        0        4        0        6        9        1        2       10
-1
/com,*********** Send User Defined Coordinate System(s) ***********
csys,0
toffst,459.67,  ! Temperature offset from absolute zero
/com,*********** Send Materials ***********
MP,KXX,1,0.124893857263761,	! slinch in s^-3 F^-1

/com,*********** Send Sheet Properties ***********
r,1,39.3700787401575

!************************* Model Summary ********************
!SYS\Surface,	Go Big Red,	matid,	1
!************************* End Model Summary ********************
/com,*********** Define Temperature Constraint ***********
CMBLOCK,_CM30   ,NODE,        2
(8i10)
         1         2
/com,*********** Create "Heat Flux" ***********
et,2,151
keyop,2,3,10        ! get plane option and thickness from underlying element
eblock,10,,,1
(15i9)
        7        2        2        2        0        4        3
-1
esel,s,type,,2
keyop,2,8,1      ! include heat flux
esel,all
fcum,add                   ! add nodal forces up (needed in case have loads on the same edge,vertex)
fcum                       ! reset default on fcum command since done sending WB F loads
/com,*********** Create "Internal Heat Generation" ***********
esel,none
esel,a,type,,1
cm,_CM34,elem
esel,all
/com,***************** Define Uniform Initial temperature ***************
tunif,71.6
fini
/com,****************************************************************************
/com,*************************    SOLUTION       ********************************
/com,****************************************************************************
/solu
antype,0                   ! static analysis
!eqsl,sparse               ! using sparse solver which is default so no eqsl command needed
cntr,print,1               ! print out contact info and also make no initial contact an error
rescontrol,,none                 ! Do not keep any restart files
dmpoption,emat,no             ! Don't combine emat file for DANSYS
dmpoption,esav,no             ! Don't combine esav file for DANSYS
/com,****************************************************
/com,******************* SOLVE FOR LS 1 OF 1 ****************
d,_CM30,temp,32.
esel,s,type,,2
nsle
sf,all,hflux,-2.85507357704957e-003
nsel,all
esel,all
bfe,_CM34,hgen,,2.90075475428236e-004
autots,on
nsub,1,10,1
time,1.
outres,erase
outres,all,none
outres,nsol,all
outres,rsol,all
outres,eangl,all
outres,veng,all
outres,fflux,all
outres,cont,all
cnvtol,heat,,.001,,8.85074579034524e-006          ! Program Controlled. Set MINREF equivalent of 1e-6 Watts
! *********** WB SOLVE COMMAND ***********
! check interactive state
*get,ANSINTER_,active,,int
*if,ANSINTER_,ne,0,then
/eof
*endif
solve
/com *************** Write FE CONNECTORS *********
CEWRITE,file,ce,,INTE
/com,****************************************************
/com,*************** FINISHED SOLVE FOR LS 1 *************
/post1
fini
